// SBML level 2 version 3
// dcterms:bibliographicCitation: http://identifiers.org/pubmed/10659856

function Function_for_degradation_of_LacI_transcripts(X, cell, kd_mRNA)
  kd_mRNA*X*cell/cell;
end

function Function_for_degradation_of_TetR_transcripts(Y, cell, kd_mRNA)
  kd_mRNA*Y*cell/cell;
end

function Function_for_degradation_of_CI_transcripts(Z, cell, kd_mRNA)
  kd_mRNA*Z*cell/cell;
end

function Function_for_translation_of_LacI(X, cell, k_tl)
  k_tl*X*cell/cell;
end

function Function_for_translation_of_TetR(Y, cell, k_tl)
  k_tl*Y*cell/cell;
end

function Function_for_translation_of_CI(Z, cell, k_tl)
  k_tl*Z*cell/cell;
end

function Function_for_degradation_of_LacI(PX, cell, kd_prot)
  kd_prot*PX*cell/cell;
end

function Function_for_degradation_of_TetR(PY, cell, kd_prot)
  kd_prot*PY*cell/cell;
end

function Function_for_degradation_of_CI(PZ, cell, kd_prot)
  kd_prot*PZ*cell/cell;
end

function Function_for_transcription_of_LacI(KM, PZ, a0_tr, a_tr, cell, n)
  (a0_tr + a_tr*KM^n/(KM^n + (PZ*cell)^n))/cell;
end

function Function_for_transcription_of_TetR(KM, PX, a0_tr, a_tr, cell, n)
  (a0_tr + a_tr*KM^n/(KM^n + (PX*cell)^n))/cell;
end

function Function_for_transcription_of_CI(KM, PY, a0_tr, a_tr, cell, n)
  (a0_tr + a_tr*KM^n/(KM^n + (PY*cell)^n))/cell;
end

model BIOMD0000000012()
  // Elowitz2000 - Repressilator
  // This model describes the deterministic version of the repressilator system.
  // The authors of this model (see reference) use three transcriptional repressor systems that are not part of any natural biological clock to build an oscillating network that they called the repressilator. The model system was induced in Escherichia coli.
  // In this system, LacI (variable X is the mRNA, variable PX is the protein) inhibits the tetracycline-resistance transposon tetR (Y, PY describe mRNA and protein). Protein tetR inhibits the gene Cl from phage Lambda (Z, PZ: mRNA, protein),and protein Cl inhibits lacI expression. With the appropriate parameter values this system oscillates.
  // This model is described in the article:
  // A synthetic oscillatory network of transcriptional regulators.
  // Elowitz MB, Leibler S.
  // Nature. 2000 Jan; 403(6767):335-338
  // Abstract:
  // Networks of interacting biomolecules carry out many essential functions in living cells, but the 'design principles' underlying the functioning of such intracellular networks remain poorly understood, despite intensive efforts including quantitative analysis of relatively simple systems. Here we present a complementary approach to this problem: the design and construction of a synthetic network to implement a particular function. We used three transcriptional repressor systems that are not part of any natural biological clock to build an oscillating network, termed the repressilator, in Escherichia coli. The network periodically induces the synthesis of green fluorescent protein as a readout of its state in individual cells. The resulting oscillations, with typical periods of hours, are slower than the cell-division cycle, so the state of the oscillator has to be transmitted from generation to generation. This artificial clock displays noisy behaviour, possibly because of stochastic fluctuations of its components. Such 'rational network design may lead both to the engineering of new cellular behaviours and to an improved understanding of naturally occurring networks.
  // The model is based upon the equations in Box 1 of the paper; however, these equations as printed are dimensionless, and the correct dimensions have been returned to the equations, and the parameters set to reproduce Figure 1C (left).
  // The original model was generated by B.E. Shapiro using Cellerator version 1.0 update 2.1127 using Mathematica 4.2 for Mac OS X (June 4, 2002), November 27, 2002 12:15:32, using (PowerMac,PowerPC, Mac OS X,MacOSX,Darwin).
  // Nicolas Le Novere provided a corrected version generated by SBMLeditor on Sun Aug 20 00:44:05 BST 2006. This removed the EmptySet species. Ran fine on COPASI 4.0 build 18.
  // Bruce Shapiro revised the model with SBMLeditor on 23 October 2006 20:39 PST. This defines default units and correct reactions. The original Cellerator reactions while being mathematically correct did not accurately reflect the intent of the authors. The original notes were mostly removed because they were mostly incorrect in the revised version. Tested with MathSBML 2.6.0.
  // Nicolas Le Novere changed the volume to 1 cubic micrometre, to allow for stochastic simulation.
  // Changed by Lukas Endler to use the average livetime of mRNA instead of its halflife and a corrected value of alpha and alpha0.
  // Moreover, the equations used in this model were clarified, cf. below.
  // The equations given in box 1 of the original publication are rescaled in three respects (lowercase letters denote the rescaled, uppercase letters the unscaled number of molecules per cell):
  // the time is rescaled to the average mRNA lifetime, t_ave: τ = t/t_ave
  // the mRNA concentration is rescaled to the translation efficiency eff: m = M/eff
  // the protein concentration is rescaled to Km: p = P/Km
  // α in the equations should be in units of rescaled proteins per promotor and cell, and β is the ratio of the protein to the mRNA decay rates or the ratio of the mRNA to the protein halflife.
  // In this version of the model α and β are calculated correspondingly to the article, while p and m where just replaced by P/Km resp. M/eff and all equations multiplied by 1/t_ave . Also, to make the equations easier to read, commonly used variables derived from the parameters given in the article by simple rules were introduced.
  // The parameters given in the article were:
  // promotor strength (repressed) ( tps_repr ): 5*10 -4 transcripts/(promotor*s)
  // promotor strength (full) ( tps_active ): 0.5 transcripts/(promotor*s)
  // mRNA half life, τ 1/2,mRNA : 2 min
  // protein half life, τ 1/2,prot : 10 min
  // K M : 40 monomers/cell
  // Hill coefficient n: 2
  // From these the following constants can be derived:
  // average mRNA lifetime ( t_ave ): τ 1/2,mRNA /ln(2) = 2.89 min
  // mRNA decay rate ( kd_mRNA ): ln(2)/ τ 1/2,mRNA = 0.347 min -1
  // protein decay rate ( kd_prot ): ln(2)/ τ 1/2,prot
  // transcription rate ( a_tr ): tps_active*60 = 29.97 transcripts/min
  // transcription rate (repressed) ( a0_tr ): tps_repr*60 = 0.03 transcripts/min
  // translation rate ( k_tl ): eff*kd_mRNA = 6.93 proteins/(mRNA*min)
  // α : a_tr*eff*τ 1/2,prot /(ln(2)*K M ) = 216.4 proteins/(promotor*cell*Km)
  // α 0 : a0_tr*eff*τ 1/2,prot /(ln(2)*K M ) = 0.2164 proteins/(promotor*cell*Km)
  // β : k_dp/k_dm = 0.2
  // Annotation by the Kinetic Simulation Algorithm Ontology (KiSAO):
  // To reproduce the simulations run published by the authors, the model has to be simulated with any of two different approaches. First, one could use a deterministic method ( KISAO_0000035 ) with continuous variables ( KISAO_0000018 ). One sample algorithm to use is the CVODE solver ( KISAO_0000019 ). Second, one could simulate the system using Gillespie's direct method ( KISAO_0000029 ), which is a stochastic method ( KISAO_0000036 ) supporting adaptive timesteps ( KISAO_0000041 ) and using discrete variables ( KISAO_0000016 ).
  // This model is hosted on BioModels Database and identified by: BIOMD0000000012 .
  // To cite BioModels Database, please use: BioModels Database: An enhanced, curated and annotated resource for published quantitative kinetic models .
  // To the extent possible under law, all copyright and related or neighbouring rights to this encoded model have been dedicated to the public domain worldwide. Please refer to CC0 Public Domain Dedication for more information.
  // hasTaxon taxonomy:562
  // biomodels.db:BIOMD0000000012
  // biomodels.db:MODEL6615351360
  // isVersionOf GO:0040029
  // hasTaxon taxonomy:562
  // isDescribedBy pubmed:10659856

  // Compartments:
  compartment cell = 1;  // GO:0005623

  // Species:
  // lacI inhibitor
  species PX in cell = 0; PX is "LacI protein";  // uniprot:P03023
  // Tet repressor protein
  species PY in cell = 0; PY is "TetR protein";  // uniprot:P04483
  // lambda repressor
  species PZ in cell = 0; PZ is "cI protein";  // uniprot:P03034
  species X in cell = 0; X is "LacI mRNA";  // encodes uniprot:P03023; isVersionOf CHEBI:33699; isVersionOf kegg.compound:C00046
  species Y in cell = 20/cell; Y is "TetR mRNA";  // encodes uniprot:P04483; isVersionOf kegg.compound:C00046; isVersionOf CHEBI:33699
  species Z in cell = 0; Z is "cI mRNA";  // encodes uniprot:P03034; isVersionOf CHEBI:33699; isVersionOf kegg.compound:C00046

  // Parameters:
  // Average number of proteins per transcript
  eff = 20; eff is "translation efficiency";
  // Hill coefficient
  n = 2;
  // Number of repressor molecules per cell giving half maximal repression, in monomers per cell
  KM = 40;
  tau_mRNA = 2; tau_mRNA is "mRNA half life";
  tau_prot = 10; tau_prot is "protein half life";
  var t_ave; t_ave is "average mRNA life time";
  // Transcrition from free promotor in transcripts per second and promotor
  ps_a = 0.5; ps_a is "tps_active";
  // Transcrition from fully repressed promotor in transcripts per second and promotor
  ps_0 = 0.0005; ps_0 is "tps_repr";

  // Assignment rules:
  t_ave := tau_mRNA/ln(2);
  beta := tau_mRNA/tau_prot;
  kd_mRNA := ln(2)/tau_mRNA;
  kd_prot := ln(2)/tau_prot;
  k_tl := eff/t_ave;
  a_tr := (ps_a - ps_0)*60;
  alpha := a_tr*eff*tau_prot/(ln(2)*KM);
  a0_tr := ps_0*60;
  alpha0 := a0_tr*eff*tau_prot/(ln(2)*KM);

  // Reactions:
  degradation_of_LacI_transcripts: X => ; cell*Function_for_degradation_of_LacI_transcripts(X, cell, kd_mRNA);  // isVersionOf GO:0006402
  degradation_of_TetR_transcripts: Y => ; cell*Function_for_degradation_of_TetR_transcripts(Y, cell, kd_mRNA);  // isVersionOf GO:0006402
  degradation_of_CI_transcripts: Z => ; cell*Function_for_degradation_of_CI_transcripts(Z, cell, kd_mRNA);  // isVersionOf GO:0006402
  translation_of_LacI: => PX; cell*Function_for_translation_of_LacI(X, cell, k_tl);  // modifiers: X; isVersionOf GO:0006412
  translation_of_TetR: => PY; cell*Function_for_translation_of_TetR(Y, cell, k_tl);  // modifiers: Y; isVersionOf GO:0006412
  translation_of_CI: => PZ; cell*Function_for_translation_of_CI(Z, cell, k_tl);  // modifiers: Z; isVersionOf GO:0006412
  degradation_of_LacI: PX => ; cell*Function_for_degradation_of_LacI(PX, cell, kd_prot);  // isVersionOf GO:0030163
  degradation_of_TetR: PY => ; cell*Function_for_degradation_of_TetR(PY, cell, kd_prot);  // isVersionOf GO:0030163
  degradation_of_CI: PZ => ; cell*Function_for_degradation_of_CI(PZ, cell, kd_prot);  // isVersionOf GO:0030163
  transcription_of_LacI: => X; cell*Function_for_transcription_of_LacI(KM, PZ, a0_tr, a_tr, cell, n);  // modifiers: PZ; isVersionOf GO:0006351
  transcription_of_TetR: => Y; cell*Function_for_transcription_of_TetR(KM, PX, a0_tr, a_tr, cell, n);  // modifiers: PX; isVersionOf GO:0006351
  transcription_of_CI: => Z; cell*Function_for_transcription_of_CI(KM, PY, a0_tr, a_tr, cell, n);  // modifiers: PY; isVersionOf GO:0006351

  // Unit definitions:
  unit volume = 1e-15 litre; volume is "cubic microns";
  unit substance = item; substance is "item";
  unit time = 60 second; time is "minute";
end
